# Worksheet setting: ORIGIN = 1
# Лабораторна робота №4
# Виконав студент групи IC-31 Коваль Богдан
# 1. Задамо матрицю А вказавши змінні (відповідно маріанту):
t := 1
k := -8
a := 0.11*t
b := 0.02*k
d := 0.015*t
g := 0.02*k
# Завдання. Обчислити власні значення та власні вектори матриці А методом Данилевського
A := [
    6.26 + a, 1.1 - b, 0.97 + g, 1.24 - d;
    1.1 - b, 4.16 - a, 1.3, 0.16;
    0.97 + g, 1.3, 5.44 + a, 2.1;
    1.24 - d, 0.16, 2.1, 6.1 - a
]
A = [6.37, 1.26, 0.81, 1.225; 1.26, 4.05, 1.3, 0.16; 0.81, 1.3, 5.55, 2.1; 1.225, 0.16, 2.1, 5.99]
# 1) Знаходження власних значень матриці А
# Етап 1:
# 1.1) Зведемо матрицю А до нормальної форми Фробеніуса
M3 := [
    1, 0, 0, 0;
    0, 1, 0, 0;
    A[4, 1]/(-A[4, 3]), A[4, 2]/(-A[4, 3]), 1/A[4, 3], A[4, 4]/(-A[4, 3]);
    0, 0, 0, 1
]
E := [1, 0, 0, 0; 0, 1, 0, 0; 0, 0, 1, 0; 0, 0, 0, 1]
# Е - одинична матриця
M3 = [1, 0, 0, 0; 0, 1, 0, 0; -0.583333, -0.0761905, 0.47619, -2.85238; 0, 0, 0, 1]
M3^-1 = [1, 0, 0, 0; 0, 1, 0, 0; 1.225, 0.16, 2.1, 5.99; 0, 0, 0, 1]
A1 := M3^-1*A*M3
A1 = [
    5.8975, 1.19829, 0.385714, -1.08543;
    0.501667, 3.95095, 0.619048, -3.5481;
    2.20695, 3.94205, 12.1115, -30.7318;
    0, 0, 1, 0
]
# Етап 2:
M2 := [
    1, 0, 0, 0;
    A1[3, 1]/(-A1[3, 2]), 1/A1[3, 2], A1[3, 3]/(-A1[3, 2]), A1[3, 4]/(-A1[3, 2]);
    0, 0, 1, 0;
    0, 0, 0, 1
]
M2^-1 = [1, 0, 0, 0; 2.20695, 3.94205, 12.1115, -30.7318; 0, 0, 1, 0; 0, 0, 0, 1]
A2 := M2^-1*A1*M2
M2 = [1, 0, 0, 0; -0.559849, 0.253675, -3.0724, 7.7959; 0, 0, 1, 0; 0, 0, 0, 1]
A2 = [5.22664, 0.303975, -3.29589, 8.25629; 4.79298, 16.7334, -83.4176, 125.655; 0, 1, 0, 0; 0, 0, 1, 0]
# Етап 3:
M1 := [
    1/A2[2, 1], A2[2, 2]/(-A2[2, 1]), A2[2, 3]/(-A2[2, 1]), A2[2, 4]/(-A2[2, 1]);
    0, 1, 0, 0;
    0, 0, 1, 0;
    0, 0, 0, 1
]
M1 = [0.208638, -3.49122, 17.4041, -26.2164; 0, 1, 0, 0; 0, 0, 1, 0; 0, 0, 0, 1]
M1^-1 = [4.79298, 16.7334, -83.4176, 125.655; 0, 1, 0, 0; 0, 0, 1, 0; 0, 0, 0, 1]
A3 := M1^-1*A2*M1
A3 = [21.96, -169.42, 545.851, -617.179; 1, 0, 0, 0; 0, 1, 0, 0; 0, 0, 1, 0]
# Матрицю P, що має нормальну форму Фробеніуса
P := A3
P = [21.96, -169.42, 545.851, -617.179; 1, 0, 0, 0; 0, 1, 0, 0; 0, 0, 1, 0]
# 1.2) Знаходимо власні значення як корені характеристичного рівняння
λ^4 - 21.96*λ^3 + 169.42*λ^2 - 545.851*λ + 617.179
v := [617.17885; -545.85101; 169.41988; -21.96; 1]
λ := polyroots(v)
λ = [2.68065; 4.44212; 5.6281; 9.20912]
# Порівняння значення отриманих в програмі
λ^4 - 21.96*λ^3 + 169.41988*λ^2 - 545.85101*λ + 617.17885
v_p := [617.17885; -545.85101; 169.04128; -21.96; 1]
λ_p := polyroots(v)
λ_p = [2.68065; 4.44212; 5.6281; 9.20912]
# Перевірка. Порівняємо власні значення, знайдені методом Данилевського та власні значення,  знайдені засобами Mathcad та значення отримані за допомогою власної програми.
# Розрахунок в MathCad
# Розрахунок у влас.
# програмі
# Розрахунок вбудованою
# функцією MathCad
λ = [2.68065; 4.44212; 5.6281; 9.20912]
λ_p = [2.68065; 4.44212; 5.6281; 9.20912]
eigenvals(A) = [9.20913; 5.62809; 4.44213; 2.68065]
# Порівняємо
λ == λ_p = 1
# Результат 1, отже значення з програми правильні.
# 2) Знаходження власних векторів матриці А
# 2.1) Знайдемо власні вектори матриці P (значення підставляємо із програми)
λ1 := 2.68068
λ2 := 4.44187
λ3 := 5.62842
λ4 := 9.20903  # Залежить заг. похибка (з прог.)
y1 := [λ1^3; λ1^2; λ1; 1]
y2 := [λ2^3; λ2^2; λ2; 1]
y3 := [λ3^3; λ3^2; λ3; 1]
y4 := [λ4^3; λ4^2; λ4; 1]
y1 = [19.2635; 7.18605; 2.68068; 1]
y3 = [178.303; 31.6791; 5.62842; 1]
y2 = [87.639; 19.7302; 4.44187; 1]
y4 = [780.983; 84.8062; 9.20903; 1]
# 2.2) Обчислимо матрицю подібності S=M3*M2*M1
S := M3*M2*M1
S = [
    0.208638, -3.49122, 17.4041, -26.2164;
    -0.116806, 2.20823, -12.8161, 22.4731;
    -0.112806, 1.8683, -8.69974, 10.7283;
    0, 0, 0, 1
]
# 2.3) Знайдемо власні вектори матриці A
x1 := S*y1 = [-0.630489; 1.73569; -1.34032; 1]
x2 := S*y2 = [0.492761; -1.1221; -0.939156; 1]
x4 := S*y4 = [0.924331; 0.497841; 0.955747; 1]
x3 := S*y3 = [-1.6566; -0.533195; 0.834793; 1]
A*x1 - λ1*x1 = [0.000227436; -0.00012733; -0.00012297; -9.32587e-15]
A*x2 - λ2*x2 = [0.000548535; -0.000307097; -0.000296581; -5.32907e-15]
A*x3 - λ3*x3 = [0.000856232; -0.00047936; -0.000462946; -6.21725e-15]
A*x4 - λ4*x4 = [0.00223064; -0.00124882; -0.00120606; 2.4869e-14]
# Власні вектори матриці А, знайдені засобами Mathcad:
# матриця, що містить всі нормовані власні вектори
# матриці А
eigenvecs(A, "L") = [
    0.532582, 0.761982, 0.267724, 0.253108;
    0.28656, 0.245494, -0.61008, -0.696719;
    0.550165, -0.383892, -0.510427, 0.537969;
    0.575811, -0.460156, 0.543682, -0.401383
]
# Нормовані власні вектори матриці А, знайдені методом Данилевського:
x1/length(x1) = [-0.157622; 0.433922; -0.335081; 0.25]
x4/length(x4) = [0.231083; 0.12446; 0.238937; 0.25]
x3/length(x3) = [-0.41415; -0.133299; 0.208698; 0.25]
x2/length(x2) = [0.12319; -0.280524; -0.234789; 0.25]
eigenvec(A, λ1) - x1/length(x1) = [-0.0954861; 0.262798; -0.202887; 0.151383]
eigenvec(A, λ3) - x3/|x3| = [1.52405; 0.490774; -0.767913; -0.920175]
eigenvec(A, λ2) - x2/|x2| = [-0.535595; 1.22007; 1.02096; -1.08729]
eigenvec(A, λ4) - x4/length(x4) = [0.301499; 0.162099; 0.311228; 0.325811]
